# Примеры вычисление различных интегралов в MathCad:
ORIGIN := 1
# Одноратные интегралы:
integral((8 + sqrt(x^4))^3, x) factor → x*(168*x^4 + 2240*sqrt(x^4) + 5*(x^4)^(3/2) + 17920)/35
integral((α + sqrt(x^4))^3, x) factor → x*(35*α^2*sqrt(x^4) + 21*α*x^4 + 35*α^3 + 5*(x^4)^(3/2))/35
# Кратные интегралы:
# Команда (процедура) выполнить: ----->
integral(integral(x + y^3, x = -1 .. 1), y = a .. b) → b^4/2 - a^4/2
# Команда (процедура) factor
integral(integral(x + y^3, x = -1 .. 1), y = a .. b) factor → -(a - b)*(a + b)*(a^2 + b^2)/2
# erf(x) - функция ошибок
erf(x) == 2/sqrt(π)*integral(e^(-t^2), t = 0 .. x)
integral(integral(integral(x + z + y^3, x = 1 .. 2), y = -1 .. 1), z = a .. b) factor → -(a - b)*(a + b + 3)
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integral(e^(-2*x^2), x) factor → sqrt(2)/4*sqrt(π)*erf(sqrt(2)*x)
integral(e^(-α*x^2), x) factor → sqrt(π)*erf(sqrt(α)*x)/(2*sqrt(α))
# НЕСОБСТВЕННЫЕ ИНТЕГРАЛЫ | Интегралы типа Пуассона
integral(e^(-x^2), x = -∞ .. ∞) factor → sqrt(π)
integral(e^(-x^2), x = 0 .. ∞) factor → sqrt(π)/2
integral(integral(e^(-(x^2 + y^2)), x = -∞ .. ∞), y = -∞ .. ∞) factor → π
integral(integral(integral(e^(-(x^2 + y^2 + z^2)), x = -∞ .. ∞), y = -∞ .. ∞), z = -∞ .. ∞) → π^(3/2)
# Приложение интегралов.
# Пример 1. 1 Найти площадь фигуры, ограниченную функцией
# f (x) = 2 x^2 + 3 x - 7, осью Ох и прямыми x = - 4 и x = 3.
# 2. Найти длину кривой f (x)  на этом отрезке.
# 3. Проиллюстрировать задачу графически.
# Решение.
# 1. Формируем функцию f(x).
f(x) := 2*x^2 + 3*x - 7
# 2. Строим график функции f(x) на заданном отрезке.
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# Покажем область, площадь которой требуется вычислить.
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# A | B
# 2. Находим координаты точек А и В. , решив уравнение f (x) = 0 .
f(x) == 0 solve → [sqrt(65)/4 - 3/4; -sqrt(65)/4 - 3/4] = [1.26556; -2.76556]
B := (-3 + sqrt(65))/4
A := (-3 - sqrt(65))/4
integral(f(x), x = -4 .. 3) → 7/6 = 1.16667
# Площадь выделенной фигуры: S = S_1 + S_2 + S_3
S[1] := integral(f(x), x = -4 .. A) = 7.39681
S[2] := |integral(f(x), x = A .. B)| = 21.8353
S[3] := integral(f(x), x = B .. 3)
S := S[1] + S[2] + S[3] = 44.8372
# 2. Длина дуги L :
L := integral(sqrt(1 + (d/dx(f(x)))^2), x = -4 .. 3) = 50.2076
# Пример 2. 1. Найти площадь, ограниченную цепной линией y(x,a),
# осями координат и прямой x = a (a > 0).
# 2. Найти длину цепной линии  между точками с абциссами
# 0 и x (x > 0).
# 3. Проиллюстрировать задачу графически.
# Решение.
# Это гиперболический косинус.
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y1(x, a) := a*cosh(x/a)
y(x, a) := a/2*(e^(x/a) + e^(-x/a))
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S(a) := a/2*integral(e^(x/a) + e^(-x/a), x = 0 .. a) simplify → -a^2*(e^-1 - e)/2
d/dx(y(x, a)) simplify → sinh(x/a)
d/dx(y1(x, a)) factor → sinh(x/a)
integral(cosh(x/a), x) → a*sinh(x/a)
d/dx(y(x, a)) factor → (e^(x/a) - e^(-1/a*x))/2
L(x, a) := integral(sqrt(1 + sinh(x/a)^2), x = 0 .. x) simplify → integral(sqrt(cosh(x/a)^2), x = 0 .. x)
integral(cosh(x/a), x = 0 .. x) → a*sinh(x/a)
# Задание 1. 1 Найти площадь фигуры, ограниченную функцией
# f (x) =  x^2 -  x^3/2, осью Ох и прямыми x = - 2 и x = 3.
# 2. Найти длину кривой f (x)  на этом отрезке.
# 3. Проиллюстрировать задачу графически.
# Задание 2.  1. Найти площадь S и длину L астроиды, (параметрически
# заданная функция):  x(t) =  R cos(t)^3 ;  y(t) = R sin(t)^3 ; R = 1.
#
# 2. Проиллюстрировать задачу графически.
R := 1
x(t) := R*cos(t)^3
y(t) := R*sin(t)^3
# График астриды:
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# Задание 3.  Найти площадь S и длину L кардоиды, (полярные координаты):
# ρ(φ) =  a( 1+cos(φ))  ;  a = 1.
#
# Проиллюстрировать задачу графически.
a := 1
ρ(φ) := a*(1 + cos(φ))
# График  кардоиды
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