# I . Провести исследование функции:
ORIGIN := 1
f2(x) := (8 + sqrt(x^4))^3
Y(x) := (x^2 - 5*x + 6*e^(-x^2))/(8 + sqrt(x^4))^3
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# 1. Построить график функции.
#
# 2. Найти и изобразить на графике асимптоты функции.
#
# 3. Найти корни уравнения: Y(x) = 0.
#
# 4. Найти экстремумы
#
# 5. Найти точки перегиба.
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# 1. Строим график функции .
# Фрагмент графика функции на [2 ; 220]. .
f1(x) := x^2 - 5*x + 6*e^(-x^2)
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# 3. Ищем нули функции.
# Имеем два вещественных корня:
x1 := root(Y(x), x, 0, 1) = 0.777797
x2 := root(Y(x), x, 4, 6) = 5
u := 0.7
Given
Y(u) == 0
Find(Y(u), u) = [0; 0.776923]
u := 4
Given
Y(u) == 0
Find(Y(u), u) = [0; 5]
# 2. Найдём асимптоты.
# 1) Горизонтальная асимптота:
limit(Y(x), x → ∞) → 0
limit(Y(x), x → -∞) → 0
# Ось абцисс:  y(x) = 0
# 2) Наклонные асимптоты  As(x) = ax + b :
a := limit(Y(x)/x, x → ∞) → 0
b := limit(Y(x) - a*x, x → ∞) → 0
# Наклонных асимптот НЕТ
# 3) Вертикальных асимптот нет, т.к. нет точек разрыва у функции :
# Вычисляем первую производную P1(x) функции Y(x).
P1(x) := (d/dx(Y(x))) → -(12*x*e^(-x^2) - 2*x + 5)/(sqrt(x^4) + 8)^3 - 6*x^3*(6*e^(-x^2) - 5*x + x^2)/((sqrt(x^4) + 8)^4*sqrt(x^4))
# 4.2 Строим график первой производной P1(x) функции Y(x). | Фрагмент графика Р1(х) на [5 ; 20].
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limit(P1(x), x → -∞) → 0
limit(P1(x), x → ∞) → 0
# 3. Ищем нули первой производной функции  P1(x).
# Имеем три точки подрозрителльные на экстремум
# Совместный график функции Y(x) и её 1-ой производной P1(x)
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u := -0.5
xp1 := root(P1(u), u) = -0.36105
Y(xp1) = 0.0134012
u := 1
xp2 := root(P1(u), u) = 1.48625
Y(xp2) = -0.00428892
u := 2
xp3 := root(P1(u), u) = 6.62591
Y(xp3) = 7.705e-5
# См. на знаки производной и фиксируем тип экстремумов.
P1(xp1 - 0.1) = 0.0018652
xmax1 := xp1 = -0.36105
P1(xp1 + 0.1) = -0.00236326
P1(xp2 - 0.1) = -0.00122744
xmin := xp2 = 1.48625
P1(xp2 + 0.1) = 0.000943515
P1(xp3 - 0.1) = 2.65882e-6
xmax2 := xp3 = 6.62591
P1(xp3 + 0.1) = -2.30332e-6
# 5. Ищем точки перегиба.
# 5.1 Вычисляем вторую производную P2(x) функции Y(x).
P2(x) := d^2/dx^2(Y(x)) → (24*x^2*e^(-x^2) - 12*e^(-x^2) + 2)/(sqrt(x^4) + 8)^3 + 48*x^2*(6*e^(-x^2) - 5*x + x^2)/(sqrt(x^4) + 8)^5 + 12*x^3*(12*x*e^(-x^2) - 2*x + 5)/((sqrt(x^4) + 8)^4*sqrt(x^4)) - 18*x^2*(6*e^(-x^2) - 5*x + x^2)/((sqrt(x^4) + 8)^4*sqrt(x^4)) + 12*x^6*(6*e^(-x^2) - 5*x + x^2)/((sqrt(x^4) + 8)^4*(x^4)^(3/2))
# Строим график второй производной P2(x) функции Y(x). | Фрагмент графика второй производной P2(x) на [-10 ; -1].
limit(P2(x), x → -100) float, 10 → 2.139277316e-11
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# Фрагмент графика второй производной P2(x) на [2 ; 10]. | Фрагмент графика второй производной P2(x) на [7 ; 13].
limit(P2(x), x → 10) float, 10 → 0.000002486034302
limit(P2(x), x → 1000) float, 10 → 1.984899875e-17
limit(P2(x), x → ∞) float, 10 → 0.0
limit(P2(x), x → 8) float, 10 → -0.000001190748362  # Производная P2(x) сверху асимптотически приближается к оси Ох.
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# 2) Ищем  точки перегиба.
#
# Из вида  второй производной  и её графика  следует, что имеются
# 6 подозрительных на перегиб точки.
u := -3
qp1 := root(P2(u), u) = -2.36451
Y(qp1) = 0.00694542
u := -1.5
qp2 := root(P2(u), u) = -1.53626
Y(qp2) = 0.00953974
u := -1
qp3 := root(P2(u), u) = -0.807807
Y(qp3) = 0.0120655
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u := 0.5
qp4 := root(P2(u), u) = 0.44781
Y(qp4) = 0.00520648
u := 2
qp5 := root(P2(u), u) = 2.10187
Y(qp5) = -0.00314335
u := 7
qp6 := root(P2(u), u) = 8.22087
Y(qp6) = 6.1323e-5
