# Работа с матрицами и векторами.
ORIGIN := 1  # Нумерацию вести с 1
# I. Простейшие стандартные операции.
# 1а. Сформировать вектор-столбец V[10,1], вектор-строку W[10,1] и
# матрицу M[5,5] с помощью средств (панель -Mатрица) в Маткад.
# 1б. Сформировать матрицу Z[N, N] с помощью двойного цикла .
N := 20
k := 1 .. N
m := 1 .. N
Z[k, m] := sqrt(k^2 + m^2)
V := [1; 2; 3; 4; 5; 6; 7; 8; 9; 0]
W := [0, 1, 2, 3, 4, 5, 6, 7, 8, 9]
M := [1, 2, 3, 4, 5; 0, 1, 9, 3, 4; 0, 7, 1, 2, 3; 3, 4, 0, 1, 2; 2, 9, 4, 5, 6]
Z = [
    1.41421, 2.23607, 3.16228, 4.12311, 5.09902, 6.08276, 7.07107, 8.06226, 9.05539, 10.0499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;
    2.23607, 2.82843, 3.60555, 4.47214, 5.38516, 6.32456, 7.28011, 8.24621, 9.21954, 10.198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;
    3.16228, 3.60555, 4.24264, 5, 5.83095, 6.7082, 7.61577, 8.544, 9.48683, 10.4403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;
    4.12311, 4.47214, 5, 5.65685, 6.40312, 7.2111, 8.06226, 8.94427, 9.84886, 10.7703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;
    5.09902, 5.38516, 5.83095, 6.40312, 7.07107, 7.81025, 8.60233, 9.43398, 10.2956, 11.1803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;
    6.08276, 6.32456, 6.7082, 7.2111, 7.81025, 8.48528, 9.21954, 10, 10.8167, 11.6619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;
    7.07107, 7.28011, 7.61577, 8.06226, 8.60233, 9.21954, 9.89949, 10.6301, 11.4018, 12.2066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;
    8.06226, 8.24621, 8.544, 8.94427, 9.43398, 10, 10.6301, 11.3137, 12.0416, 12.8062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;
    9.05539, 9.21954, 9.48683, 9.84886, 10.2956, 10.8167, 11.4018, 12.0416, 12.7279, 13.4536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;
    10.0499, 10.198, 10.4403, 10.7703, 11.1803, 11.6619, 12.2066, 12.8062, 13.4536, 14.1421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;
    11.0454, 11.1803, 11.4018, 11.7047, 12.083, 12.53, 13.0384, 13.6015, 14.2127, 14.8661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;
    12.0416, 12.1655, 12.3693, 12.6491, 13, 13.4164, 13.8924, 14.4222, 15, 15.6205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;
    13.0384, 13.1529, 13.3417, 13.6015, 13.9284, 14.3178, 14.7648, 15.2643, 15.8114, 16.4012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;
    14.0357, 14.1421, 14.3178, 14.5602, 14.8661, 15.2315, 15.6525, 16.1245, 16.6433, 17.2047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;
    15.0333, 15.1327, 15.2971, 15.5242, 15.8114, 16.1555, 16.5529, 17, 17.4929, 18.0278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;
    16.0312, 16.1245, 16.2788, 16.4924, 16.7631, 17.088, 17.4642, 17.8885, 18.3576, 18.868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;
    17.0294, 17.1172, 17.2627, 17.4642, 17.72, 18.0278, 18.3848, 18.7883, 19.2354, 19.7231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;
    18.0278, 18.1108, 18.2483, 18.4391, 18.6815, 18.9737, 19.3132, 19.6977, 20.1246, 20.5913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;
    19.0263, 19.105, 19.2354, 19.4165, 19.6469, 19.9249, 20.2485, 20.6155, 21.0238, 21.4709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;
    20.025, 20.0998, 20.2237, 20.3961, 20.6155, 20.8806, 21.1896, 21.5407, 21.9317, 22.3607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]
# 2. Транспонировать векторы и матрицу.
transpose(M) = [1, 0, 0, 3, 2; 2, 1, 7, 4, 9; 3, 9, 1, 0, 4; 4, 3, 2, 1, 5; 5, 4, 3, 2, 6]
transpose(W) → [0; 1; 2; 3; 4; 5; 6; 7; 8; 9]
transpose(W) = [0; 1; 2; 3; 4; 5; 6; 7; 8; 9]
transpose(M) → [1, 0, 0, 3, 2; 2, 1, 7, 4, 9; 3, 9, 1, 0, 4; 4, 3, 2, 1, 5; 5, 4, 3, 2, 6]
transpose(V) → [1, 2, 3, 4, 5, 6, 7, 8, 9, 0]
transpose(V) = [1, 2, 3, 4, 5, 6, 7, 8, 9, 0]
# 3. Выделить отдельные элементы
# векторов и матрицы:
V[2] = 2
W[1, 3] = 2
M[4, 4] = 1
W := [0, 1, 2, 3, 4, 5, 6, 7, 8, 9]
# 4. Найти определитель матрицы М
|M| → -504
|M| = -504
# 5. Найти  матрицу МО, обратную к М
V := [1; 2; 3; 4; 5; 6; 7; 8; 9; 0]
M = [1, 2, 3, 4, 5; 0, 1, 9, 3, 4; 0, 7, 1, 2, 3; 3, 4, 0, 1, 2; 2, 9, 4, 5, 6]
MO := M^-1 = [
    -0.0972222, 0, -0.319444, 0.263889, 0.152778;
    -0.152778, 0, 0.0694444, -0.0138889, 0.0972222;
    -0.154762, 0.142857, -0.0595238, 0.0119048, 0.0595238;
    -0.259921, -0.285714, -0.894841, -0.621032, 1.06151;
    0.581349, 0.142857, 0.787698, 0.44246, -0.954365
]
# 6. Проверка. Произведение М МО должно дать единичную матрицу.
M*MO = [1, 0, 0, 0, 0; 0, 1, 0, 0, 0; 0, 0, 1, 0, 0; 0, 0, 0, 1, 0; 0, 0, 0, 0, 1]
M*MO float, 4 → [
    1.0, -2.322e-16, -1.245e-15, -3.67e-16, 1.084e-15;
    -1.5e-16, 1.0, -6.6e-16, -9.6e-17, 5.02e-16;
    -3.1e-16, -1.114e-16, 1.0, -1.4e-16, 6.18e-16;
    -1.4e-16, -4.061e-17, -4.5e-16, 1.0, 2.7e-16;
    -4.9e-16, -2.198e-16, -1.235e-15, -2.67e-16, 1.0
]
# 7. Выделить из матрицы М первый и третий столбцы и присвоить им
# идентификаторы V1 и V2.
V1 := M[:, 1] = [1; 0; 0; 3; 2]
V3 := M[:, 3] = [3; 9; 1; 0; 4]
# 8. Найти длины векторов V1 и V3 :
|V1| → sqrt(14) = 3.74166
|V3| → sqrt(107) = 10.3441
# 8a. Найти скалярное S13 и  векторное P13 произведение векторов
# V1 и V3
S13 := V1*V3 = 11
V13 := V1×V3  # error: Значение должно быть вектором с тремя элементами.
# 8b. Работаем с векторами, у которых только три компоненты
a := [1; 2; 3]
b := [2; -2; 3]
scal := a*b = 7
vect := a×b = [12; 3; -6]
# 8c. Проверим ортогональность W1 и W3  с вектором  VW13
a*vect = 0
b*vect = 0
# II. Функции определения матриц и операции с блоками матриц.
# 1. matrix(m,n,F). Cоздаёт и заполняет матрицу размерности (m x n),
# элемент которой, расположенный в i -той строке,
# j -м столбце, равен значению функции F(i , j).
# Функцию
# F(x,y)
# задаём в
# обычной
# форме:
F(x, y) := x + y
A := matrix(3, 4, F) = [0, 1, 2, 3; 1, 2, 3, 4; 2, 3, 4, 5]
B := matrix(4, 3, F) = [0, 1, 2; 1, 2, 3; 2, 3, 4; 3, 4, 5]
0^2 + sqrt(0) = 0
0^2 + sqrt(1) = 1
0^2 + sqrt(2) = 1.41421
0^2 + sqrt(3) = 1.73205
H(x, y) := x^2 + sqrt(y)
B := matrix(3, 4, H) = [0, 1, 1.41421, 1.73205; 1, 2, 2.41421, 2.73205; 4, 5, 5.41421, 5.73205]
B float, 6 → [0, 1.0, 1.41421, 1.73205; 1.0, 2.0, 2.41421, 2.73205; 4.0, 5.0, 5.41421, 5.73205]
# 2. diag(v). Cоздаёт диагональную матрицу, элементы главной
# диагонали  которой хранятся в векторе v.
DV := diag(V)
DV → [
    1, 0, 0, 0, 0, 0, 0, 0, 0, 0;
    0, 2, 0, 0, 0, 0, 0, 0, 0, 0;
    0, 0, 3, 0, 0, 0, 0, 0, 0, 0;
    0, 0, 0, 4, 0, 0, 0, 0, 0, 0;
    0, 0, 0, 0, 5, 0, 0, 0, 0, 0;
    0, 0, 0, 0, 0, 6, 0, 0, 0, 0;
    0, 0, 0, 0, 0, 0, 7, 0, 0, 0;
    0, 0, 0, 0, 0, 0, 0, 8, 0, 0;
    0, 0, 0, 0, 0, 0, 0, 0, 9, 0;
    0, 0, 0, 0, 0, 0, 0, 0, 0, 0
]
V → [1; 2; 3; 4; 5; 6; 7; 8; 9; 0]
N := 10
k := 1 .. N
m := 1 .. N
D[k, m] := 0
D[k, k] := V[k]
D = [
    1, 0, 0, 0, 0, 0, 0, 0, 0, 0;
    0, 2, 0, 0, 0, 0, 0, 0, 0, 0;
    0, 0, 3, 0, 0, 0, 0, 0, 0, 0;
    0, 0, 0, 4, 0, 0, 0, 0, 0, 0;
    0, 0, 0, 0, 5, 0, 0, 0, 0, 0;
    0, 0, 0, 0, 0, 6, 0, 0, 0, 0;
    0, 0, 0, 0, 0, 0, 7, 0, 0, 0;
    0, 0, 0, 0, 0, 0, 0, 8, 0, 0;
    0, 0, 0, 0, 0, 0, 0, 0, 9, 0;
    0, 0, 0, 0, 0, 0, 0, 0, 0, 0
]
# 3. identity(n). Cоздаёт единичную матрицу порядка  n.
E := identity(3) = [1, 0, 0; 0, 1, 0; 0, 0, 1]
# СЛИЯНИЕ МАТРИЦ
# 4. augment(A,B). Формирует матрицу,  в первых строках которой
# содержится матрица A, а  в последних - матрица B.
# (Присоединили к А справа матрицу В).
# Матрицы A и B должны иметь одинаковое число строк.
A = [0, 1, 2, 3; 1, 2, 3, 4; 2, 3, 4, 5]
E = [1, 0, 0; 0, 1, 0; 0, 0, 1]
D := augment(A, E) = [0, 1, 2, 3, 1, 0, 0; 1, 2, 3, 4, 0, 1, 0; 2, 3, 4, 5, 0, 0, 1]
# 5. stack(A,B). Формирует матрицу,в первых строках которой
# содержится матрица A, а  в последних - матрица B.
# (Присоединили к А снизу снова матрицу А).
# Матрицы A и B должны иметь одинаковое число столбцов.
A = [0, 1, 2, 3; 1, 2, 3, 4; 2, 3, 4, 5]
B := -5*A = [0, -5, -10, -15; -5, -10, -15, -20; -10, -15, -20, -25]
Q := stack(A, B) = [0, 1, 2, 3; 1, 2, 3, 4; 2, 3, 4, 5; 0, -5, -10, -15; -5, -10, -15, -20; -10, -15, -20, -25]
# ВЫРЕЗАЕМ БЛОК ИЗ МАТРИЦЫ
# Эта матрица уже была ранее нами сформирована выше
# 6. submatrix(A,ir,jr,ic,jc). Формирует матрицу, которая является
# блоком матрицы А, расположенным в строках с номера  от
# ir по jr и  в столбцах  с номера ic по jc.
A = [0, 1, 2, 3; 1, 2, 3, 4; 2, 3, 4, 5]
SA := submatrix(A, 2, 3, 3, 4) = [3, 4; 4, 5]
Z = [
    1.41421, 2.23607, 3.16228, 4.12311, 5.09902, 6.08276, 7.07107, 8.06226, 9.05539, 10.0499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;
    2.23607, 2.82843, 3.60555, 4.47214, 5.38516, 6.32456, 7.28011, 8.24621, 9.21954, 10.198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;
    3.16228, 3.60555, 4.24264, 5, 5.83095, 6.7082, 7.61577, 8.544, 9.48683, 10.4403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;
    4.12311, 4.47214, 5, 5.65685, 6.40312, 7.2111, 8.06226, 8.94427, 9.84886, 10.7703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;
    5.09902, 5.38516, 5.83095, 6.40312, 7.07107, 7.81025, 8.60233, 9.43398, 10.2956, 11.1803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;
    6.08276, 6.32456, 6.7082, 7.2111, 7.81025, 8.48528, 9.21954, 10, 10.8167, 11.6619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;
    7.07107, 7.28011, 7.61577, 8.06226, 8.60233, 9.21954, 9.89949, 10.6301, 11.4018, 12.2066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;
    8.06226, 8.24621, 8.544, 8.94427, 9.43398, 10, 10.6301, 11.3137, 12.0416, 12.8062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;
    9.05539, 9.21954, 9.48683, 9.84886, 10.2956, 10.8167, 11.4018, 12.0416, 12.7279, 13.4536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;
    10.0499, 10.198, 10.4403, 10.7703, 11.1803, 11.6619, 12.2066, 12.8062, 13.4536, 14.1421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;
    11.0454, 11.1803, 11.4018, 11.7047, 12.083, 12.53, 13.0384, 13.6015, 14.2127, 14.8661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;
    12.0416, 12.1655, 12.3693, 12.6491, 13, 13.4164, 13.8924, 14.4222, 15, 15.6205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;
    13.0384, 13.1529, 13.3417, 13.6015, 13.9284, 14.3178, 14.7648, 15.2643, 15.8114, 16.4012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;
    14.0357, 14.1421, 14.3178, 14.5602, 14.8661, 15.2315, 15.6525, 16.1245, 16.6433, 17.2047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;
    15.0333, 15.1327, 15.2971, 15.5242, 15.8114, 16.1555, 16.5529, 17, 17.4929, 18.0278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;
    16.0312, 16.1245, 16.2788, 16.4924, 16.7631, 17.088, 17.4642, 17.8885, 18.3576, 18.868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;
    17.0294, 17.1172, 17.2627, 17.4642, 17.72, 18.0278, 18.3848, 18.7883, 19.2354, 19.7231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;
    18.0278, 18.1108, 18.2483, 18.4391, 18.6815, 18.9737, 19.3132, 19.6977, 20.1246, 20.5913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;
    19.0263, 19.105, 19.2354, 19.4165, 19.6469, 19.9249, 20.2485, 20.6155, 21.0238, 21.4709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;
    20.025, 20.0998, 20.2237, 20.3961, 20.6155, 20.8806, 21.1896, 21.5407, 21.9317, 22.3607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]
SZ := submatrix(Z, 2, 7, 3, 5) = [
    3.60555, 4.47214, 5.38516;
    4.24264, 5, 5.83095;
    5, 5.65685, 6.40312;
    5.83095, 6.40312, 7.07107;
    6.7082, 7.2111, 7.81025;
    7.61577, 8.06226, 8.60233
]
# III.  Функции вычисления различных числовых
# характеристик  матриц.
# 1. last(V). Вычисление номера последней компоненты вектора V.
last(V) = 10
last(V1) = 5
# 2. length(V). Вычисление количества компонент вектора V.
length(V) = 10
V → [1; 2; 3; 4; 5; 6; 7; 8; 9; 0]
V1 → [1; 0; 0; 3; 2]
# 3. rows(Q). Вычисление количества строк в матрице Q.
rows(Q) = 6
# 4. cols(Q). Вычисление количества столбцов в матрице Q.
Q = [0, 1, 2, 3; 1, 2, 3, 4; 2, 3, 4, 5; 0, -5, -10, -15; -5, -10, -15, -20; -10, -15, -20, -25]
cols(Q) = 4
# 5. max(Q). Вычисление наибольшего элемента в матрице Q.
max(Q) = 5
max(V) = 9
# 6. min(Q). Вычисление наименьшего элемента в матрице Q.
Qcvad := submatrix(Q, 1, 3, 1, 3) = [0, 1, 2; 1, 2, 3; 2, 3, 4]
min(Q) = -25
# 7. tr(Q). Вычисление следа (шпур, трек-сумма диагональных
# элементов) квадратной матрицы Qcvad.
tr(Q) =  # error: Эта матрица должна быть квадратной.
tr(Qcvad) = 6
# 8. rank(A) Вычисление ранга матрицы Q.
rank(Q) = 2
rank(Z) = 15
# Спектральная задача - нахождение собственных векторов и собственных функций матрицы.
# 9. eigenvals(С) Вычисление собственных значений квадратной
# матрицы С.
C := [1, 0, 2, 3; 2, 3, 4, 5; 3, 2, 1, 1; 2, 3, 5, 7]
Λ := eigenvals(C) = [11.77; -1.05348; 0.64173 + 0.483086i; 0.64173 - 0.483086i]
# 10. eigenvecs(С) Вычисление собственных векторов квадратной
# матрицы С.
LC := eigenvecs(C) = [
    -0.249282, -0.297626, 0.199842 + 0.298198i, 0.199842 - 0.298198i;
    -0.585773, -0.244063, -0.156654 - 0.27771i, -0.156654 + 0.27771i;
    -0.246078, 0.848911, 0.694992, 0.694992;
    -0.730872, -0.362218, -0.535212 - 0.0034314i, -0.535212 + 0.0034314i
]
# 11. eigenvec(С,t) Вычисление собственного вектора квадратной
# матрицы С , отвечающего собственному значению  t.
t := Λ[1] = 11.77
VC1 := eigenvec(C, t) = [0.249282; 0.585773; 0.246078; 0.730872]
# 12. lsolve(C,b) Решение системы линейных уравнений  C X = b.
# матрица
# коэффициентов
# вектор
# правых частей
# вектор решений
# системы линейных ур-й
C = [1, 0, 2, 3; 2, 3, 4, 5; 3, 2, 1, 1; 2, 3, 5, 7]
b := [1; 0; 2; 1]
X := lsolve(C, b) = [1; 0; -3; 2]
# IV. Действия с матрицами. Основные матричные операции.
# 1.  Умножение на число.
D := 2*C = [2, 0, 4, 6; 4, 6, 8, 10; 6, 4, 2, 2; 4, 6, 10, 14]
d := b = [1; 0; 2; 1]
# 2.  Сложение и вычитание матриц одинаковой размерности.
D = [2, 0, 4, 6; 4, 6, 8, 10; 6, 4, 2, 2; 4, 6, 10, 14]
C = [1, 0, 2, 3; 2, 3, 4, 5; 3, 2, 1, 1; 2, 3, 5, 7]
S := D + C = [3, 0, 6, 9; 6, 9, 12, 15; 9, 6, 3, 3; 6, 9, 15, 21]
Δ := D - C = [1, 0, 2, 3; 2, 3, 4, 5; 3, 2, 1, 1; 2, 3, 5, 7]
# 3.  Умножение  матриц одинаковой размерности.  Число столбцов
# первой должно быть равно числу строк второй.
U := Δ*S = [39, 39, 57, 78; 90, 96, 135, 180; 36, 33, 60, 81; 111, 120, 168, 225]
# 4.  Транспонирование.
U = [39, 39, 57, 78; 90, 96, 135, 180; 36, 33, 60, 81; 111, 120, 168, 225]
T := transpose(U) = [39, 90, 36, 111; 39, 96, 33, 120; 57, 135, 60, 168; 78, 180, 81, 225]
# 5.  Вычисление обратной матрицы.
U^-1 → [
    17/64, 95/192, -13/192, -89/192;
    -5/64, -43/192, -5/64, 15/64;
    -17/32, 65/96, 13/96, -13/32;
    59/192, -121/192, -5/192, 79/192
]
U^-1 = [
    0.265625, 0.494792, -0.0677083, -0.463542;
    -0.078125, -0.223958, -0.078125, 0.234375;
    -0.53125, 0.677083, 0.135417, -0.40625;
    0.307292, -0.630208, -0.0260417, 0.411458
]
U*U^-1 → [1, 0, 0, 0; 0, 1, 0, 0; 0, 0, 1, 0; 0, 0, 0, 1]
# 6. Ортогональная матрица R(α).
R(α) := [cos(α), sin(α); -sin(α), cos(α)]
transpose(R(α)) → [cos(α), -sin(α); sin(α), cos(α)]
R(α)^-1 simplify → [cos(α), -sin(α); sin(α), cos(α)]
# Свойства ортогональной матрицы:
R(α)*transpose(R(α)) simplify → [1, 0; 0, 1]
R(α)*R(α)^-1 simplify → [1, 0; 0, 1]
# Пример работы символьного редактора:
# оператор | оператор □ simplify →
|R(α)| → cos(α)^2 + sin(α)^2
|R(α)| simplify → 1
R(α)^-1 → [
    cos(α)/(cos(α)^2 + sin(α)^2), -sin(α)/(cos(α)^2 + sin(α)^2);
    sin(α)/(cos(α)^2 + sin(α)^2), cos(α)/(cos(α)^2 + sin(α)^2)
]
R(α)^-1 simplify → [cos(α), -sin(α); sin(α), cos(α)]
R(α)*transpose(R(α)) simplify → [1, 0; 0, 1]
R(α)*transpose(R(α)) → [cos(α)^2 + sin(α)^2, 0; 0, cos(α)^2 + sin(α)^2]
# 7. Возведение в целую положительную степень элементов матрицы.
C = [1, 0, 2, 3; 2, 3, 4, 5; 3, 2, 1, 1; 2, 3, 5, 7]
C^0 → [1, 0, 0, 0; 0, 1, 0, 0; 0, 0, 1, 0; 0, 0, 0, 1]
C^1 → [1, 0, 2, 3; 2, 3, 4, 5; 3, 2, 1, 1; 2, 3, 5, 7]
C^2 → [13, 13, 19, 26; 30, 32, 45, 60; 12, 11, 20, 27; 37, 40, 56, 75]
C^3 → [148, 155, 227, 305; 349, 366, 533, 715; 148, 154, 223, 300; 435, 457, 665, 892]
|C| → -8
# Возведение в степень элементов  матрицы в символьном редакторе
R(α) := [cos(α), sin(α); -sin(α), cos(α)]
R(α)^2 → [cos(α)^2 - sin(α)^2, 2*cos(α)*sin(α); -2*cos(α)*sin(α), cos(α)^2 - sin(α)^2]
R(α)^2 simplify → [cos(2*α), sin(2*α); -sin(2*α), cos(2*α)]
R(α)^3 simplify → [cos(3*α), sin(3*α); -sin(3*α), cos(3*α)]
R(α)^4 simplify → [cos(4*α), sin(4*α); -sin(4*α), cos(4*α)]
# ВИЗУАЛИЗАЦИЯ МАТРИЦ
# [component: inputs C]
C = [1, 0, 2, 3; 2, 3, 4, 5; 3, 2, 1, 1; 2, 3, 5, 7]
# Сформировать матрицу M [50,50] по заданной функции с
# помощью двойного цикла и визуализировать её графически.
F(x, y) := sin(x + y) + cos(x*y)  # 3D - график функции F(x,y)
# [component: inputs F]
X[1] := 0
Y[1] := 0
h := 0.1
k := 2 .. 50
X[k] := X[k - 1] + h
Y[k] := Y[k - 1] + h
i := 1 .. 50
j := 1 .. 50
M[i, j] := F(X[i], Y[j])
# 3D - график матрицы M_(i,j) [50, 50]
# [component: inputs M]
# [component: inputs M]
# [component: inputs M]
# [component: inputs M]
