f(x) := ln(1 + x)
g(x) := e^x - x^3
# Правило Лопиталя:  пределы типа  0/0  и  inf / inf .
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# 1. Пределы типа  inf / inf :
# Задача 1.
f(x) := ln(1 + x)
g(x) := e^x - x^3
Y(x) := f(x)/g(x) → ln(x + 1)/(e^x - x^3)
limit(Y(x), x → ∞) → 0
# Ищем корень функции Y(x)
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u := 1
x1 := root(Y(u), u) = 1.46658e-13
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# Точки разрыва  Y(x)
r1 := -1
u := 1
r2 := root(g(u), u) = 1.85718
u := 4
r3 := root(g(u), u) = 4.5364
# График  g(x):
u := 1
r2 := root(g(u), u) = 1.85718
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Given
g(u) == 0
Find(u) float, 20 → 1.8571838602078353365
f1(x) := d/dx(f(x)) → 1/(x + 1)
g1(x) := d/dx(g(x)) → e^x - 3*x^2
# Ищем точки экстремумов  функции Y(x)
# D1(x) - первая производная от Y(x):
D1(x) := d/dx(Y(x))
D1(x) → 1/((x + 1)*(e^x - x^3)) - ln(x + 1)*(e^x - 3*x^2)/(e^x - x^3)^2
limit(D1(x), x → ∞) → 0
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# Нули  производная от Y(x):
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u := 4
d1 := root(D1(u), u) = 3.65442
# d1 - точка локального максимума Y(x).
# Точки разрыва  производной D1(x) те же, что и у функции  Y(x):
r1 = -1
r2 = 1.85718
r3 = 4.5364
u := 4
r3 := root(D1(u), u) = 3.65442
# или
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r3 := root(D1(u), u, 3, 4) = 3.65441
v := 3.654
Given
D1(v) == 0
Find(D1(v), v) = [0; 3.65442]
# Сравнительные графики функции Y(x) и её первой производной D1(x)
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# Ищем точки перегиба  функции Y(x)
# D2(x) - вторая производная от Y(x):
D2(x) := d/dx(D1(x))
D2(x) := 2*ln(x + 1)*(e^x - 3*x^2)^2/(e^x - x^3)^3 - 1/((x + 1)^2*(e^x - x^3)) - ln(x + 1)*(e^x - 6*x)/(e^x - x^3)^2 - (2*e^x - 6*x^2)/((x + 1)*(e^x - x^3)^2)
limit(D1(x), x → 10) float, 5 → -0.00011351
limit(D1(x), x → 1000) float, 5 → -0
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# Нули  второй производная от Y(x):
u := -0.71
q1 := root(D2(u), u) = -0.703328
u := -0.49
q2 := root(D2(u), u) = -0.491178
u := 0.65
q3 := root(D2(u), u) = 0.676005
# Точки разрыва  производной D1(x) те же, что и у функции  Y(x):
r1 = -1
r2 = 1.85718
r3 = 3.65441
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D2(3) float, 10 → -0.380105022
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