# Задача 3.
f(x) := tan(x)
g(x) := ln(e^x - 1)
Y(x) := f(x)/g(x) → tan(x)/ln(e^x - 1)
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g(x) == 0 solve → ln(2) = 0.693147
f(x) := tan(sin(x))
g(x) := ln(e^x - 1)
Y(x) := f(x)/g(x) → tan(sin(x))/ln(e^x - 1)
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g(x) == 0 solve → ln(2) = 0.693147
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g(x) == 0 solve → ln(2) = 0.693147
limit(Y(x), x → ∞) → limit(tan(sin(x))/ln(e^x - 1), x → ∞)
# Ищем корень функции Y(x)
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u := 1
x1 := root(Y(u), u) = 3.14159
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# Точки разрыва  Y(x)
r1 := -1
u := 1
r2 := root(g(u), u) = 0.693147
u := 4
r3 := root(g(u), u) = 0.693147
# График  g(x):
u := 1
r2 := root(g(u), u) = 0.693147
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Given
g(u) == 0
Find(u) float, 20 → 0.69314718055994530942
f1(x) := d/dx(f(x)) → cos(x)*(tan(sin(x))^2 + 1)
g1(x) := d/dx(g(x)) → e^x/(e^x - 1)
# Ищем точки экстремумов  функции Y(x)
# D1(x) - первая производная от Y(x):
D1(x) := d/dx(Y(x))
D1(x) → cos(x)*(tan(sin(x))^2 + 1)/ln(e^x - 1) - e^x*tan(sin(x))/(ln(e^x - 1)^2*(e^x - 1))
limit(D1(x), x → ∞) → -limit(1/ln(e^x - 1)^2*e^x*tan(sin(x))/(e^x - 1), x → ∞)
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# Нули  производная от Y(x):
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u := 4
d1 := root(D1(u), u) = 7.79551
# d1 - точка локального максимума Y(x).
# Точки разрыва  производной D1(x) те же, что и у функции  Y(x):
r1 = -1
r2 = 0.693147
r3 = 0.693147
u := 4
r3 := root(D1(u), u) = 7.79551
# или
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r3 := root(D1(u), u, 3, 4)  # error: Значения функции в конечных точках должны иметь противоположные знаки.
v := 3.654
Given
D1(v) == 0
Find(D1(v), v) = [0; 10.954]
# Сравнительные графики функции Y(x) и её первой производной D1(x)
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# Ищем точки перегиба  функции Y(x)
# D2(x) - вторая производная от Y(x):
D2(x) := d/dx(D1(x))
D2(x) := 2*ln(x + 1)*(e^x - 3*x^2)^2/(e^x - x^3)^3 - 1/((x + 1)^2*(e^x - x^3)) - ln(x + 1)*(e^x - 6*x)/(e^x - x^3)^2 - (2*e^x - 6*x^2)/((x + 1)*(e^x - x^3)^2)
limit(D1(x), x → 10) float, 5 → -0.10856
limit(D1(x), x → 1000) float, 5 → 0.0012253
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# Нули  второй производная от Y(x):
u := -0.71
q1 := root(D2(u), u) = -0.703328
u := -0.49
q2 := root(D2(u), u) = -0.491178
u := 0.65
q3 := root(D2(u), u) = 0.676005
# Точки разрыва  производной D1(x) те же, что и у функции  Y(x):
r1 = -1
r2 = 0.693147
r3 =  # error: Эта переменная не определена.
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D2(3) float, 10 → -0.380105022
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