ORIGIN := 1
# Задание1.
# Провести исследование функции:
# Провести исследование функции:
Y(x) := (x^3 - 5*x - 1)/(x^2 + 2*x - 3)
Y(x) == (x^2 - 5*x + 6*e^(-x^2))/(8 + sqrt(x^4))^3
# 1. Построить фрагмент графика функции для x∈ [-8;8] и y∈ [-15;10].
# Нанести сетку.
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# 2. Найти корни уравнения: Y(x) = 0.
#
# 1) Снять корни q1, q2, q3  с помощью трассировщика с графика.
# корни с графика:
q1 := -2.128
q2 := -0.208
q3 := 2.336
# 2) Найти корни с помощью процедуры solve и блока Given Find.
# Результат вывести с точностью 20 и 10 знаков соответственно.
# Создать вектор-столбец Q точных корней (из solve).
Y(x) == 0 solve; float, 20 → [2.3300587395679820293; -0.20163967572340466145; -2.1284190638445773679]
Q := [2.33005873957; -0.201639675723; -2.12841906384]
Q = [2.33006; -0.20164; -2.12842]
Q[1] = 2.33006
Q[2] = -0.20164
Q[3] = -2.12842
Given
Y(x) == 0
Find(x) float, 10 → [2.33005874, -0.2016396757, -2.128419064]
# 3. Найти и изобразить на графике асимптоты функции.
# Найдём асимптоты.
# 1) Горизонтальных асимптот нет:
limit(Y(x), x → ∞) → ∞
limit(Y(x), x → -∞) → -∞
# 1 | 5
# 2) Наклонные асимптоты  As(x) = ax + b :
a := limit(Y(x)/x, x → ∞) → 1
b := limit(Y(x) - a*x, x → ∞) → -2
As(x) := a*x + b
# Функция Y(x) имеет две точки разрыва 2-го рода:
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x^2 + 2*x - 3 factor → (x + 3)*(x - 1)
r1 := -3
r2 := 1
# 3) Вертикальных асимптот две:  x = - 3  и  x = 1
limit(Y(x), x → -3+) simplify → ∞
limit(Y(x), x → -3-) simplify → -∞
limit(Y(x), x → 1+) simplify → -∞
limit(Y(x), x → 1-) simplify → ∞
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# Прямая  As(x) при x>0 в т. х = 3.5 пересекает график функции  Y(x).
# После этого  в т. p3 = 11.6647 (см. ниже)из выпуклой меняется на
# вогнутую и асимптотически сверху приближается к прямой Y(x).
Y(2) - As(2) = -0.6
Y(3.5) - As(3.5) = 0
Y(5) - As(5) = 0.09375
Y(x) - As(x) == 0 solve → 7/2 = 3.5
limit(Y(x) - As(x), x → ∞) → 0
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# 4. Найти локальные экстремумы функции.
# Находим первую производную:
P1(x) := d/dx(Y(x)) factor → (x^4 + 4*x^3 - 4*x^2 + 2*x + 17)/((x + 3)^2*(x - 1)^2)
xmin := -4.7699
xmax := -1.3696  # Прямая  As(x) при x<0 является наклонной асимптотой функции Y(x).
P1(x) == 0 solve; float, 5 → [1.0697 + 1.2075i; -1.3696; -4.7699; 1.0697 - 1.2075i]
limit(Y(x) - As(x), x → -∞) → 0
2
6
# График производной Р1(х):
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# 5. Найти точки перегиба функции Y(x).
# Находим вторую производную:
P2(x) := d^2/dx^2(Y(x)) factor → 2*(2*x^3 - 21*x^2 - 24*x - 37)/((x + 3)^3*(x - 1)^3)  # Tочки перегиба:
P2(x) == 0 solve; float, 10 → [11.66470814; -0.5823540703 + 1.11662181i; -0.5823540703 - 1.11662181i]
p1 := -3
p2 := 1
p3 := 11.66470814
# 1. Вторая производная Р2(х) в точке равна нулю и меняет  знак  с минуса на плюс.
P2(11) = -0.000131195
P2(p3) = -1.07025e-13
P2(12) = 4.76389e-5
# 2.  Первая производная существует:
P1(p3) = 0.995878
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# График производной Р1(х):
limit(P2(x), x → ∞) → 0
limit(P2(x), x → -∞) → 0
7
3
p3 = 11.6647  # - точка перегиба
# Δ(х) -  разность между функцией и её асимптотой:
Δ(x) := Y(x) - As(x)
δ := 0.001
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Y(p3 - δ) = 9.76812
Y(p3) = 9.76912
Y(p3 + δ) = 9.77012
# Ищем точку пересечения  правой ветви функции Y(x) и асимптотой:
Δ(x) == 0 solve → 7/2 = 3.5
Y(3.5) → 1.5
Δ(3) = -0.0833333
Δ(3.5) = 0
Δ(4) = 0.047619
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# A(3.5 ; 1.5)
Δ(10^10) float, 25 → 1.99999999890000000028e-10
limit(Δ(x), x → ∞) → 0
Δ(10^20) float, 25 → 1.99999999999999999989e-20
# 4 | 8
